/*
HOW TO USE:

Add `#include "../path/to/CameraClassTemplate.any"`in the beginning
of your main file. Then create the camera class anywhere inside Main:

EXAMPLE:
```
#include "../path/to/CameraClassTemplate.any"

Main = {

VideoCamera MyCam (
VIDEO_NAME = "MyVideo",  # File name of the video that will be created
UP_DIRECTION = y,        # Orientation of the camera
WIDTH = 1920,            # Width resolution of the video
HEIGHT = 1080,           # Height resolution of the video
SKIP_FRAMES = 10,         # Number of frames to skip when creating the video
VIDEO_OUTPUT = "mpeg4",  # The video format created by the FFMPEG tool
) =
{
   // The point the camera focus on
   LookAtPoint = Main.MyModel.Femur.r;

   // The vertical field of view in meters
   VerticalFieldOfView = 3;

   // The direction which the camera is placed
   // (In global coordinate with respect to the LookAtPoint)
   LookPoint2Camera_direction = {1, 1, -1}

   // The background color used for the video
   BackgroundColor = {1,1,1};

   // Pointer to a alternative counter i.e. Main.Study.iStep (Optional)
   CounterPtr = &Main.Study.iStep;

   // The output path where the video is saved (Defaults to the main file directory)
   AnyFileVar OuputPath = _CAMERA_MAIN_FILE_DIRECTORY_;

   // The operations which should be included in the video.
   Analysis = {
       AnyOperation &ref = Main.MyStudy.InverseDynamics;
   };
};
```

# TO CREATE A VIDEO RUN THE FOLLOWING OPERATION:
    Main.MyCam.Make_Recording

*/

#define _CAMERA_MAIN_FILE_DIRECTORY_ ANYBODY_PATH_MAINFILEDIR
#ifdef ANYBODY_6_1_0
#define OBJ2NUM_AVAILABLE
#endif

#class_template VideoCamera (
  VIDEO_NAME = "Cam1",
  UP_DIRECTION = z,
  WIDTH = 1920,
  HEIGHT = 1080 ,
  IMAGE_EXT = "png",
  COUNTER_FORMAT = "%05d",
  FFMPEG_PATH = "ffmpeg.exe",
  SKIP_FRAMES = 0,
  OVER_WRITE = 1,
  _DEBUG = 0,
  VIDEO_OUTPUT = "mpeg4",
  _CLEAN_UP_IMAGES = 1
  )
{

/// The output path where the video is saved
#var AnyFileVar OuputPath = _CAMERA_MAIN_FILE_DIRECTORY_;

#ifdef OBJ2NUM_AVAILABLE
/// Pointer to a alternative counter i.e. Main.Study.iStep (Optional)
#var AnyObjectPtrVar CounterPtr = &_counter_flag ;

/// Internal value to give CounterPtr a default value
AnyIntVar _counter_flag = -1;
#endif

/// The point the camera focus on
#var AnyVec3 LookAtPoint = DesignVar({0,0,0});

#var AnyVar EyeTargetDistance = DesignVar(10);

/// The vertical field of view in meters
#var AnyVar VerticalFieldOfView = DesignVar(2);

/// The direction which the camera is placed
/// (In global coordinate with respect to the LookAtPoint)
#var AnyVec3 LookPoint2Camera_direction = DesignVar( {1, 1, -1});

// The following is AnyScript Magic ;)
// Covert the x/y/z Enum from UP_DIRECTION to a {1,0,0}/{0,1,0}/{0,0,1} vector
#var AnyVec3 CameraUpDirection= DesignVar({{1,0,0},{0,1,0},{0,0,1}}[round(sum({-0.5,0,0.5}*RotMat(pi, UP_DIRECTION ))+1)]);

/// The background color used for the video
#var AnyVec3 BackgroundColor = DesignVar({1,1,1});


AnyOperationSequence Show_Static_Preview =
{
    AnyFileVar preview_file = FilePathRelativeOf(.OuputPath) +"/" + VIDEO_NAME + "_Camera_Preview.png";
    AnyOperationSetValue SetFilename=
    {
        Source = {&.preview_file};
        Target = {&..Camera.rec.FileName};
    };
    AnyOperation &StartTrigger = .Camera.rec.TriggerOn;
    AnyOperationShellExec OpenPreview =
    {
        FileName = "cmd.exe";
        #var Arguments = "/C start "+ FilePathCompleteOf(.preview_file)
        #if _DEBUG
         +"&&timeout 5";
        #else
        ;
        #endif

        #var Show = _DEBUG;
    };
    AnyOperation &StopTrigger = .Camera.rec.TriggerOff;
    AnyOperationMacro ResetFilename =
    {
      MacroStr = {"classoperation "+CompleteNameOf(..Camera.rec.F)+"ileName "+strquote("Reset Value")};
    };
};

AnyOperationSequence Create_Video =
{
  AnyOperationSequence PreProcessing =
  {
    AnyOperation &StartTrigger = ..Camera.rec.TriggerOn;
  };
  AnyOperation &Operation = .Analysis;
  AnyOperationSequence PostProcessing =
  {
    AnyOperation &StopTrigger = ..Camera.rec.TriggerOff;
    AnyOperation &CreateVideo = ..Camera.rec.ConvertVideo;
    #if  _CLEAN_UP_IMAGES == 1
    AnyOperation &Cleanup= ..Camera.rec.RemoveImageFiles;
    #endif
  };
  AnyOperationShellExec PlayVideo =
  {
      FileName = "cmd.exe";
      #var Arguments = "/C start "+ FilePathCompleteOf(..Camera.rec.ConvertVideo.out_file);
      #var WorkDir =  FilePathRelativeOf(..OuputPath) ;
      #var Show =  _DEBUG;
      Wait = Off;
  };
};


  AnyCameraLookAt Camera = {

    #var Perspective = DesignVar(Off);
    #var EyePoint = .LookAtPoint + .EyeTargetDistance *.LookPoint2Camera_direction ;

    #var LookAtPoint = .LookAtPoint;

    #var UpPoint = DesignVar(EyePoint + 100*.CameraUpDirection);


    #var FocalDist = .EyeTargetDistance ;
    #var FocalHeight = .VerticalFieldOfView ;

    AnyScene Scene  =
    {
      BackgroundColor = ..BackgroundColor;
    };


    AnyCamRecorder rec = {
      AnyStringVar F = "Hack- Do not delete";
      #ifdef OBJ2NUM_AVAILABLE
      // If CounterPtr is not set (i.e. points to -1) then use the recorder counter else use CounterPtr.
      #var AnyInt _Counter = iffun(eqfun(Obj2Num(..CounterPtr),-1),Counter, round(Obj2Num(..CounterPtr)));
      #else
      #var AnyInt _Counter = Counter;
      #endif

      FileName = FilePathRelativeOf(..OuputPath) + "/"+ VIDEO_NAME  + strval(_Counter ,COUNTER_FORMAT )+ "." + IMAGE_EXT;
      #var pxWidth = WIDTH ;
      #var pxHeight = HEIGHT;
      #var Trig = DesignVar(Off);
      #var ResetTrig = Off;

      AnyOperationSetValue TriggerOff =
      {
        AnySwitchVar Offsetting = Off;
        Source = {&Offsetting };
        Target = {&.Trig};
      };
      AnyOperationSetValue TriggerOn =
      {
        AnySwitchVar OnSetting = On;
        Source = {&OnSetting};
        Target = {&.Trig};
      };

      AnyOperationShellExec ConvertVideo =
      {
        #var FileName = "cmd.exe";
        #var AnyStringVar inputfile =  VIDEO_NAME + COUNTER_FORMAT  +"." + IMAGE_EXT;

        #var AnyFileVar out_file = FilePathRelativeOf(...OuputPath) + "/"+ VIDEO_NAME + ".mp4";
        AnyFileVar ffmpegpath = FFMPEG_PATH;
        #var Arguments = "/C "+ FilePathCompleteOf(ffmpegpath) + " "+iffun(OVER_WRITE, "-y ","") + "-r 10 -start_number " +
        strval(SKIP_FRAMES,COUNTER_FORMAT) + " -i "+strquote(inputfile)+ " -c:v "+
        VIDEO_OUTPUT+" -b:v 8000k -vf "+strquote("fps=30,format=yuv420p")+" -vf "+
        strquote("scale=trunc(iw/2)*2:trunc(ih/2)*2")+" -metadata author="+
        strquote("AnyBodyTechnology")+ " " +strquote(FilePathCompleteOf(out_file))
        #if _DEBUG
         +"&&timeout 3";
        #else
        ;
        #endif

        #var WorkDir = FilePathCompleteOf(...OuputPath) ;
        #var Show = _DEBUG ;
      };
      AnyOperationSequence RemoveImageFiles =
      {
        AnyOperationShellExec DeleteOperation =
        {

          #var FileName = "cmd.exe";
          #var  Arguments = "/C del " + VIDEO_NAME +"*."+ IMAGE_EXT
          #if _DEBUG
          +"&&timeout 3";
          #else
          ;
          #endif

          #var WorkDir = FilePathCompleteOf(....OuputPath) ;
          #var Show = _DEBUG ;
        };
      };
    };

  };


AnyOperationSequence Save_Settings= {

   AnyOperationSetValue TouchSettings =
   {
     Source =
     {
       &..LookAtPoint,
       &..EyeTargetDistance,
       &..VerticalFieldOfView,
       &..LookPoint2Camera_direction,
       &..CameraUpDirection,
       &..BackgroundColor,
       &..CameraUpDirection
     };
     Target = Source;
   };
   AnyOperationMacro SaveValues =
   {
     MacroStr = {"classoperation Main "+strquote("Save Values")+ " --file=" + strquote(VIDEO_NAME +"_Camera_Settings.anyset") };
   };
};
AnyOperationMacro Load_Settings  =
{
  MacroStr = {"classoperation Main "+strquote("Load Values")+ " --file=" + strquote(VIDEO_NAME +"_Camera_Settings.anyset") };
};


AnyOperationSequence Analysis =
{
  AnyOperationDummy no_op = {};
};
};
